<neuroml xmlns="http://www.neuroml.org/schema/neuroml2"  xmlns:xs="http://www.w3.org/2001/XMLSchema" xmlns:xsi="http://www.w3.org/2001/XMLSchema-instance" xsi:schemaLocation="http://www.neuroml.org/schema/neuroml2 https://raw.github.com/NeuroML/NeuroML2/development/Schemas/NeuroML2/NeuroML_v2beta5.xsd" id="IafNet">
    <notes>Root notes</notes>
    <expOneSynapse id="syn0" gbase="65nS" erev="0mV" tauDecay="3ms"/>
    <iafCell id="iaf0" leakReversal="-65mV" thresh="-50mV" reset="-65mV" C="1.0 nF" leakConductance="10 nS"/>
    <iafCell id="iaf1" leakReversal="-65mV" thresh="-50mV" reset="-65mV" C="1.0 nF" leakConductance="20 nS"/>
    <poissonFiringSynapse id="pfs" averageRate="50Hz" synapse="syn0" spikeTarget="./syn0"/>
    <network id="IafNet">
        <notes>Netw notes</notes>
        <population id="IafPop0" component="iaf0" size="10"/>
        <population id="IafPop1" component="iaf0" size="10"/>
        <population id="Pop_x" component="iaf0" size="8" type="populationList">
            <instance id="0">
                <location x="441.302803198999982" y="127.857433631999996" z="107.764997625999996"/>
            </instance>
            <instance id="1">
                <location x="89.260781098600006" y="200.001185015999994" z="407.876782295999988"/>
            </instance>
            <instance id="2">
                <location x="398.27433064500002" y="127.664139785000003" z="262.685981474000016"/>
            </instance>
            <instance id="3">
                <location x="69.324770443099993" y="303.177696745999981" z="160.421490436999989"/>
            </instance>
            <instance id="4">
                <location x="412.115674316000025" y="338.501154152000026" z="105.79103422"/>
            </instance>
            <instance id="5">
                <location x="58.9520515723" y="254.530197601999987" z="449.973008305000008"/>
            </instance>
            <instance id="6">
                <location x="15.1769610159" y="31.118737992900002" z="124.888077073999995"/>
            </instance>
            <instance id="7">
                <location x="24.197840344900001" y="302.23722492600001" z="430.279640235999977"/>
            </instance>
        </population>
        <projection id="Proj" presynapticPopulation="Pop_x" postsynapticPopulation="Pop_x" synapse="syn0">
            <connectionWD id="0" preCellId="../Pop_x/0/iaf0" preFractionAlong="0.923897032859" postCellId="../Pop_x/2/iaf0" postFractionAlong="0.437215246739" weight="0.832212536518123" delay="2.54587611355ms"/>
            <connectionWD id="1" preCellId="../Pop_x/0/iaf0" preFractionAlong="0.560753236645" postCellId="../Pop_x/3/iaf0" postFractionAlong="0.5324290154" weight="0.11417793188029" delay="8.455360415ms"/>
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        </projection>
        <inputList id="il" population="Pop_x" component="pfs">
            <input id="0" target="../Pop_x/0/iaf0" destination="synapses"/>
            <input id="1" target="../Pop_x/1/iaf0" destination="synapses"/>
            <input id="2" target="../Pop_x/2/iaf0" destination="synapses"/>
            <input id="3" target="../Pop_x/3/iaf0" destination="synapses"/>
            <input id="4" target="../Pop_x/4/iaf0" destination="synapses"/>
            <input id="5" target="../Pop_x/5/iaf0" destination="synapses"/>
            <input id="6" target="../Pop_x/6/iaf0" destination="synapses"/>
            <input id="7" target="../Pop_x/7/iaf0" destination="synapses"/>
        </inputList>
    </network>
</neuroml>
