<?xml version="1.0" encoding="UTF-8"?>

<neuroml xmlns="http://www.neuroml.org/schema/neuroml2"
    xmlns:xsi="http://www.w3.org/2001/XMLSchema-instance"
    xsi:schemaLocation="http://www.neuroml.org/schema/neuroml2  http://neuroml.svn.sourceforge.net/viewvc/neuroml/NeuroML2/Schemas/NeuroML2/NeuroML_v2alpha.xsd"
    id="NML2_AbstractCells">

    <!-- Instances of some of the abstract cell types currently supported in NeuroML 2. The behaviour of these is defined in the LEMS
         specifications at: http://sourceforge.net/apps/trac/neuroml/browser/NeuroML2/Schemas/NeuroML2/NeuroML_v2alpha.xsd -->

    <!-- This is a "pure" NeuroML 2 file. It can be included in a LEMS file for use in a simulaton by the LEMS interpreter, see LEMS_NML2_ExN_AllCells.xml -->

    <iafTauCell id="iafTau" leakReversal="-50mV" thresh="-55mV" reset="-70mV" tau="30ms"/>

    <iafCell id="iafCell" leakReversal="-50mV" thresh="-55mV" reset="-70mV" C="0.2nF" leakConductance="0.01uS"/>

    <izhikevichCell id="1" v0 = "-70mV" thresh = "70mV" a ="0.02" b = "0.2" c = "-50.0" d = "2" Iamp="15" Idel="22ms" Idur="2000ms"/>
    <izhikevichCell id="2" v0 = "-70mV" thresh = "20mV" a ="0.02" b = "0.2" c = "-50.0" d = "2" Iamp="15" Idel="22ms" Idur="2000ms"/>
    <izhikevichCell id="3" v0 = "-70mV" thresh = "30mV" a ="0.02" b = "0.2" c = "-50.0" d = "2" Iamp="15" Idel="22ms" Idur="2000ms"/>
    <izhikevichCell id="4" v0 = "-70mV" thresh = "40mV" a ="0.02" b = "0.2" c = "-50.0" d = "2" Iamp="15" Idel="22ms" Idur="2000ms"/>

    <adExIaFCell id="adExBurst" C="281pF" gL="30nS" EL="-70.6mV" reset="-48.5mV" VT = "-50.4mV" thresh = "-40.4mV"
                 delT="2mV" tauw="40ms"  a ="4nS"   b = "0.08nA" Iamp="0.8nA"  Idel="0ms"  Idur="2000ms"/>

</neuroml>
